# LAMMPS Heating Script
units metal
atom_style charge
boundary p p p
processors * * *  # Use all available processors

# Read structure
read_data input.data

# Define potential
# Lennard-Jones + Coulomb potential for ceramics
# Assigns approximate charges based on oxidation states

# Set charges for each atom type
set type 1 charge 0.0
set type 2 charge 1.0
set type 3 charge -2.0
set type 4 charge 4.0

# Use hybrid potential: LJ for short-range, Coulomb for long-range
pair_style hybrid/overlay lj/cut 10.0 coul/cut 12.0
pair_coeff * * lj/cut 0.010 3.0  # LJ parameters (epsilon=0.01 eV, sigma=3.0 Angstrom)
pair_coeff * * coul/cut  # Coulombic interactions

# Note: For better accuracy with long-range electrostatics, use:
# pair_style hybrid/overlay lj/cut 10.0 coul/long 12.0
# kspace_style pppm 1e-4
# But this requires more setup and is slower

# Neighbor list
neighbor 2.0 bin
neigh_modify every 1 delay 0 check yes

# Initial minimization
minimize 1.0e-4 1.0e-6 1000 10000

# Initial velocities
velocity all create 300 12345 dist gaussian mom yes rot yes

# NPT heating from 300K to 4000K
fix 1 all npt temp 300 4000 $(100.0*dt) iso 1.0 1.0 $(1000.0*dt)
timestep 0.001

# Output
thermo 100
thermo_style custom step temp press vol etotal ke pe density
dump 1 all custom 1000 heating_traj.dump id type x y z vx vy vz

# Run heating
run 20000

# Save heated structure
write_data heated.data
write_dump all xyz heated.xyz modify element Eu Li O Si
undump 1

print "Heating complete - final temperature: $(temp)K"
